# ==============================================================================
# Test: 03_meshing_tetra_tetgen / test_tet10_notch_bracket.fbl
# Description: Notched structural bracket meshed with quadratic tets (te10 / C3D10) via TetGen
# ==============================================================================

# 1. Geometry Points (Stepped Notched Cantilever Bar)
pnt p1   0.0   0.0  0.0
pnt p2  60.0   0.0  0.0
pnt p3  60.0  15.0  0.0
pnt p4   0.0  20.0  0.0

pnt p5   0.0   0.0 10.0
pnt p6  60.0   0.0 10.0
pnt p7  60.0  15.0 10.0
pnt p8   0.0  20.0 10.0

# 2. Boundary Lines
line l1 p1 p2 10
line l2 p2 p3 4
line l3 p3 p4 10
line l4 p4 p1 4

line l5 p5 p6 10
line l6 p6 p7 4
line l7 p7 p8 10
line l8 p8 p5 4

line l9  p1 p5 4
line l10 p2 p6 4
line l11 p3 p7 4
line l12 p4 p8 4

# 3. Apply Bias grading towards the notch neck (p2, p3, p6, p7)
bia l1 3.0
bia l3 3.0
bia l5 3.0
bia l7 3.0

# 4. Construct Bounding Surfaces & Volume Body
gsur s_bot + BLEND + l1 + l2 + l3 + l4
gsur s_top + BLEND + l5 + l6 + l7 + l8
gsur s_front + BLEND + l1 + l10 - l5 - l9
gsur s_back + BLEND + l3 + l12 - l7 - l11
gsur s_fix + BLEND + l4 + l9 - l8 - l12
gsur s_tip + BLEND + l2 + l11 - l6 - l10

# 5. Mesh closed boundary skin with quadratic triangles (tr6)
elty all tr6
mesh all

# 6. Invoke TetGen to generate quadratic tetrahedra (te10 / C3D10)
mesh all tet

# 7. Export Abaqus Mesh
send all abq

prnt se all

quit
